*Part, name=DISC
*Node
1,0,0,0
2,1,0,0
3,1,1,0
4,0,1,0
5,0,0,1
6,1,0,1
7,1,1,1
8,0,1,1
*Element, type=C3D8, elset=HOST
1,1,2,3,4,5,6,7,8
*End Part
*Assembly
*Instance, name=DISC-1, part=DISC
*End Instance
*End Assembly
** embmesh generated fibers
*Node, nset=EMBMESH_NODES
*Element, type=T3D2, elset=EMBMESH_FIBERS
*Solid Section, elset=EMBMESH_FIBERS, material=EMBMESH_FIBER
0.785398163397448
*Material, name=EMBMESH_FIBER
*Elastic
1., 0.3
*Embedded Element, host elset=HOST
EMBMESH_FIBERS
