*Part, name=PLATE
*Node
1, 2, 0, 0
2, 2.33333333333, 0, 0
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*Element, type=C3D8R, elset=HOST
1, 1, 2, 6, 5, 65, 66, 70, 69
2, 2, 3, 7, 6, 66, 67, 71, 70
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*Solid Section, elset=HOST, material=MATRIX
,
*Solid Section, elset=HOST, material=MATRIX
,
*End Part
*Part, name=EMBFIB
*Node, nset=EMBMESH_NODES
100000, 2.09754767634, 0.101458097003, 0
100001, 2.09754767634, 0.101458097003, 5
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*Element, type=T3D2, elset=EMBMESH_FIBERS_T0
100000, 100000,100001
100001, 100002,100003
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*Element, type=T3D2, elset=EMBMESH_FIBERS_T90
100065, 100130,100131
100066, 100131,100132
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*Solid Section, elset=EMBMESH_FIBERS_T0, material=EMBMESH_FIBER
0.0314159265358979
*Solid Section, elset=EMBMESH_FIBERS_T90, material=EMBMESH_FIBER
0.0314159265358979
*End Part
*Assembly, name=Assembly
*Instance, name=PLATE-1, part=PLATE
*End Instance
*Instance, name=EMBFIB-1, part=EMBFIB
*End Instance
*Embedded Element, host elset=PLATE-1.HOST
EMBFIB-1.EMBMESH_FIBERS_T0
EMBFIB-1.EMBMESH_FIBERS_T90
*End Assembly
*Material, name=MATRIX
*Density
1.2e-09,
*Elastic
3500, 0.35
*Material, name=EMBMESH_FIBER
*Elastic
1, 0.3
*Amplitude, name=RAMP, definition=SMOOTH STEP
0., 0., 1e-05, 1.
*Step, name=S1
*Dynamic, Explicit
, 1e-05
*End Step
