*Part, name=DISC
*Node
1,0,0,0
2,1,0,0
3,1,1,0
4,0,1,0
5,0,0,1
6,1,0,1
7,1,1,1
8,0,1,1
*Element, type=C3D8, elset=HOST
1,1,2,3,4,5,6,7,8
*End Part
*Part, name=EMBFIB
*Node, nset=EMBMESH_NODES
100000, 0, 0.125, 0.125
100001, 1, 0.125, 0.125
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*Element, type=T3D2, elset=EMBMESH_FIBERS_T0
100000, 100000,100001
100001, 100002,100003
100002, 100004,100005
100003, 100006,100007
100008, 100016,100017
100009, 100018,100019
100010, 100020,100021
100011, 100022,100023
*Element, type=T3D2, elset=EMBMESH_FIBERS_T90
100004, 100008,100009
100005, 100010,100011
100006, 100012,100013
100007, 100014,100015
100012, 100024,100025
100013, 100026,100027
100014, 100028,100029
100015, 100030,100031
*Solid Section, elset=EMBMESH_FIBERS_T0, material=EMBMESH_FIBER
0.0490873852123405
*Solid Section, elset=EMBMESH_FIBERS_T90, material=EMBMESH_FIBER
0.0490873852123405
*End Part
*Part, name=EMBFIB
*Node, nset=EMBMESH_NODES
200000, 0, 0.125, 0.125
200001, 1, 0.125, 0.125
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*Element, type=T3D2, elset=EMBMESH_FIBERS_T0
200000, 200000,200001
200001, 200002,200003
200002, 200004,200005
200003, 200006,200007
200008, 200016,200017
200009, 200018,200019
200010, 200020,200021
200011, 200022,200023
*Element, type=T3D2, elset=EMBMESH_FIBERS_T90
200004, 200008,200009
200005, 200010,200011
200006, 200012,200013
200007, 200014,200015
200012, 200024,200025
200013, 200026,200027
200014, 200028,200029
200015, 200030,200031
*Solid Section, elset=EMBMESH_FIBERS_T0, material=EMBMESH_FIBER
0.0490873852123405
*Solid Section, elset=EMBMESH_FIBERS_T90, material=EMBMESH_FIBER
0.0490873852123405
*End Part
*Assembly
*Instance, name=DISC-1, part=DISC
*End Instance
*Instance, name=EMBFIB-1, part=EMBFIB
*End Instance
*Embedded Element, host elset=DISC-1.HOST
EMBFIB-1.EMBMESH_FIBERS_T0
EMBFIB-1.EMBMESH_FIBERS_T90
*Instance, name=EMBFIB-1, part=EMBFIB
*End Instance
*Embedded Element, host elset=DISC-1.HOST
EMBFIB-1.EMBMESH_FIBERS_T0
EMBFIB-1.EMBMESH_FIBERS_T90
*End Assembly
*Material, name=EMBMESH_FIBER
*Elastic
1, 0.3
*Material, name=EMBMESH_FIBER
*Elastic
1, 0.3
