*Heading
** verification deck t14_e.inp
*Part, name=PLATE
*Node
1, 0, 0, 0
2, 0.55, 0, 0
3, 1.1, 0, 0
4, 0, 0.55, 0
5, 0.55, 0.55, 0
6, 1.1, 0.55, 0
7, 0, 1.1, 0
8, 0.55, 1.1, 0
9, 1.1, 1.1, 0
10, 0, 0, 0.35
11, 0.55, 0, 0.35
12, 1.1, 0, 0.35
13, 0, 0.55, 0.35
14, 0.55, 0.55, 0.35
15, 1.1, 0.55, 0.35
16, 0, 1.1, 0.35
17, 0.55, 1.1, 0.35
18, 1.1, 1.1, 0.35
19, 0, 0, 0.7
20, 0.55, 0, 0.7
21, 1.1, 0, 0.7
22, 0, 0.55, 0.7
23, 0.55, 0.55, 0.7
24, 1.1, 0.55, 0.7
25, 0, 1.1, 0.7
26, 0.55, 1.1, 0.7
27, 1.1, 1.1, 0.7
*Element, type=C3D8R, elset=HOST
1, 1, 2, 5, 4, 10, 11, 14, 13
2, 2, 3, 6, 5, 11, 12, 15, 14
3, 4, 5, 8, 7, 13, 14, 17, 16
4, 5, 6, 9, 8, 14, 15, 18, 17
5, 10, 11, 14, 13, 19, 20, 23, 22
6, 11, 12, 15, 14, 20, 21, 24, 23
7, 13, 14, 17, 16, 22, 23, 26, 25
8, 14, 15, 18, 17, 23, 24, 27, 26
*End Part
*Part, name=EMBFIB
*Node, nset=EMBMESH_NODES
100000, 0, 0.2, 0.2
100001, 1.1, 0.2, 0.2
100002, 0, 0.6, 0.2
100003, 1.1, 0.6, 0.2
*Element, type=T3D2, elset=EMBMESH_FIBERS_T0
100000, 100000,100001
100001, 100002,100003
*Solid Section, elset=EMBMESH_FIBERS_T0, material=EMBMESH_FIBER
0.125663706143592
*End Part
*Assembly, name=Assembly
*Instance, name=PLATE-1, part=PLATE
*End Instance
*Instance, name=EMBFIB-1, part=EMBFIB
*End Instance
*Embedded Element, host elset=PLATE-1.HOST
EMBFIB-1.EMBMESH_FIBERS_T0
*End Assembly
*Material, name=EMBMESH_FIBER
*Elastic
1, 0.3
