*Heading
** verification deck t15_beam.inp
*Part, name=PLATE
*Node
1, 0, 0, 0
2, 0.5, 0, 0
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*Element, type=C3D8R, elset=HOST
1, 1, 2, 5, 4, 10, 11, 14, 13
2, 2, 3, 6, 5, 11, 12, 15, 14
3, 4, 5, 8, 7, 13, 14, 17, 16
4, 5, 6, 9, 8, 14, 15, 18, 17
5, 10, 11, 14, 13, 19, 20, 23, 22
6, 11, 12, 15, 14, 20, 21, 24, 23
7, 13, 14, 17, 16, 22, 23, 26, 25
8, 14, 15, 18, 17, 23, 24, 27, 26
*End Part
*Part, name=EMBFIB
*Node, nset=EMBMESH_NODES
100000, 0, 0.125, 0.125
100001, 1, 0.125, 0.125
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*Element, type=B31, elset=EMBMESH_FIBERS_T0
100000, 100000,100001
100001, 100002,100003
100002, 100004,100005
100003, 100006,100007
100008, 100016,100017
100009, 100018,100019
100010, 100020,100021
100011, 100022,100023
*Element, type=B31, elset=EMBMESH_FIBERS_T90
100004, 100008,100009
100005, 100010,100011
100006, 100012,100013
100007, 100014,100015
100012, 100024,100025
100013, 100026,100027
100014, 100028,100029
100015, 100030,100031
*Beam Section, elset=EMBMESH_FIBERS_T0, material=EMBMESH_FIBER, section=CIRC
0.125, 0, 0, 1
*Beam Section, elset=EMBMESH_FIBERS_T90, material=EMBMESH_FIBER, section=CIRC
0.125, 0, 0, 1
*Normal
100000, 100000, 0, 0, 1
100000, 100001, 0, 0, 1
100001, 100002, 0, 0, 1
100001, 100003, 0, 0, 1
100002, 100004, 0, 0, 1
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100015, 100031, 0, 0, 1
*End Part
*Assembly, name=Assembly
*Instance, name=PLATE-1, part=PLATE
*End Instance
*Instance, name=EMBFIB-1, part=EMBFIB
*End Instance
*Embedded Element, host elset=PLATE-1.HOST
EMBFIB-1.EMBMESH_FIBERS_T0
EMBFIB-1.EMBMESH_FIBERS_T90
*End Assembly
*Material, name=EMBMESH_FIBER
*Elastic
1, 0.3
