*Heading
** verification deck t17_409564.inp
*Part, name=PLATE
*Node
1, 0, 0, 0
2, 0.5, 0, 0
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*Element, type=C3D8R, elset=HOST
1, 1, 2, 7, 6, 26, 27, 32, 31
2, 2, 3, 8, 7, 27, 28, 33, 32
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*Nset, nset=XSYM
1,6,11,16,21,26,31,36,41,46,51,56,61,66,71
*Nset, nset=YSYM
1,2,3,4,5,26,27,28,29,30,51,52,53,54,55
*End Part
*Assembly, name=Assembly
*Instance, name=PLATE-1, part=PLATE
*End Instance
*End Assembly
*Step, name=S
*Dynamic, Explicit
, 1e-3
*Boundary
PLATE-1.XSYM, 1, 1
PLATE-1.YSYM, 2, 2
*End Step
