*Heading
** verification deck t17_409564.inp
*Part, name=PLATE
*Node
1, 0, 0, 0
2, 0.5, 0, 0
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*Element, type=C3D8R, elset=HOST
1, 1, 2, 7, 6, 26, 27, 32, 31
2, 2, 3, 8, 7, 27, 28, 33, 32
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*Nset, nset=XSYM
1,6,11,16,21,26,31,36,41,46,51,56,61,66,71
*Nset, nset=YSYM
1,2,3,4,5,26,27,28,29,30,51,52,53,54,55
*End Part
*Part, name=EMBFIB
*Node, nset=EMBMESH_NODES
100000, 0, 0.125, 0.125
100001, 2, 0.125, 0.125
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*Element, type=T3D2, elset=EMBMESH_FIBERS_T0
100000, 100000,100001
100001, 100002,100003
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*Element, type=T3D2, elset=EMBMESH_FIBERS_T90
100008, 100016,100017
100009, 100018,100019
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*Solid Section, elset=EMBMESH_FIBERS_T0, material=EMBMESH_FIBER
0.0490873852123405
*Solid Section, elset=EMBMESH_FIBERS_T90, material=EMBMESH_FIBER
0.0490873852123405
*End Part
*Assembly, name=Assembly
*Instance, name=PLATE-1, part=PLATE
*End Instance
*Instance, name=EMBFIB-1, part=EMBFIB
*End Instance
*Embedded Element, host elset=PLATE-1.HOST
EMBFIB-1.EMBMESH_FIBERS_T0
EMBFIB-1.EMBMESH_FIBERS_T90
** embmesh propagated fiber nodes to symmetry set XSYM
*Nset, nset=XSYM
100000, 100002, 100004, 100006, 100008, 100010, 100012, 100014, 100032, 100034, 100036, 100038, 100040, 100042, 100044, 100046
** embmesh propagated fiber nodes to symmetry set YSYM
*Nset, nset=YSYM
100016, 100018, 100020, 100022, 100024, 100026, 100028, 100030, 100048, 100050, 100052, 100054, 100056, 100058, 100060, 100062
*End Assembly
*Step, name=S
*Dynamic, Explicit
, 1e-3
*Boundary
PLATE-1.XSYM, 1, 1
PLATE-1.YSYM, 2, 2
*End Step
*Material, name=EMBMESH_FIBER
*Elastic
1, 0.3
