*Heading
*Preprint, echo=NO, model=YES, history=NO, contact=NO
** verification deck symbare_src.inp
*Part, name=PLATE
*Node
1, 0, 0, 0
2, 0.5, 0, 0
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*Element, type=C3D8R, elset=HOST
1, 1, 2, 7, 6, 26, 27, 32, 31
2, 2, 3, 8, 7, 27, 28, 33, 32
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*Nset, nset=XSYM
1,6,11,16,21,26,31,36,41,46,51,56,61,66,71
*Nset, nset=YSYM
1,2,3,4,5,26,27,28,29,30,51,52,53,54,55
*Solid Section, elset=HOST, material=MATRIX
,
*End Part
*Assembly, name=Assembly
*Instance, name=PLATE-1, part=PLATE
*End Instance
*Nset, nset=RIGHT, instance=PLATE-1
5, 10, 15, 20, 25, 30, 35, 40, 45, 50, 55, 60, 65, 70, 75
*End Assembly
*Material, name=MATRIX
*Density
1.2e-09,
*Elastic
3500, 0.35
*Amplitude, name=RAMP, definition=SMOOTH STEP
0., 0., 1e-05, 1.
*Step, name=S1
*Dynamic, Explicit
, 1e-05
*Boundary
XSYM, 1, 1
YSYM, 2, 2
*Boundary, amplitude=RAMP
RIGHT, 1, 1, 0.001
*Output, history, frequency=1000000
*Node Output, nset=RIGHT
RF1, RF2, RF3, U1, U2, U3
*Output, field, number interval=5
*Node Output
U, RF
*Element Output, directions=YES
S, E
*Output, history, time interval=2e-07
*Energy Output
ALLIE, ALLKE, ALLWK, ALLVD, ALLAE, ETOTAL
*End Step
** embmesh generated fibers
*Node, nset=EMBMESH_NODES
100000, 0, 0.125, 0.125
100001, 2, 0.125, 0.125
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*Element, type=T3D2, elset=EMBMESH_FIBERS
100000, 100000,100001
100001, 100002,100003
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*Solid Section, elset=EMBMESH_FIBERS, material=EMBMESH_FIBER
0.0490873852123405
*Material, name=EMBMESH_FIBER
*Elastic
1., 0.3
*Embedded Element, host elset=HOST
EMBMESH_FIBERS
** embmesh propagated fiber nodes to symmetry set XSYM
*Nset, nset=XSYM
100000, 100002, 100004, 100006, 100008, 100010, 100012, 100014, 100032, 100034, 100036, 100038, 100040, 100042, 100044, 100046
** embmesh propagated fiber nodes to symmetry set YSYM
*Nset, nset=YSYM
100016, 100018, 100020, 100022, 100024, 100026, 100028, 100030, 100048, 100050, 100052, 100054, 100056, 100058, 100060, 100062
