*Heading
*Preprint, echo=NO, model=YES, history=NO, contact=NO
** verification deck cantilever_40x4x4_src.inp
*Part, name=PLATE
*Node
1, 0, 0, 0
2, 2.5, 0, 0
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*Element, type=C3D8R, elset=HOST
1, 1, 2, 43, 42, 206, 207, 248, 247
2, 2, 3, 44, 43, 207, 208, 249, 248
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*Solid Section, elset=HOST, material=MATRIX
,
*End Part
*Assembly, name=Assembly
*Instance, name=PLATE-1, part=PLATE
*End Instance
*Nset, nset=FIXED, instance=PLATE-1
1, 42, 83, 124, 165, 206
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*Nset, nset=TIP, instance=PLATE-1
41, 82, 123, 164, 205, 246
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*End Assembly
** embmesh generated fibers
*Node, nset=EMBMESH_NODES
100000, 0, 13.5857864376, 5
100001, 100, 13.5857864376, 5
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*Element, type=T3D2, elset=EMBMESH_FIBERS
100000, 100000,100001
100001, 100002,100003
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*Solid Section, elset=EMBMESH_FIBERS, material=EMBMESH_FIBER
3.14159265358979
*Material, name=EMBMESH_FIBER
*Elastic
1., 0.3
*Embedded Element, host elset=HOST
EMBMESH_FIBERS
