*Heading
*Preprint, echo=NO, model=YES, history=NO, contact=NO
** verification deck cantilever_40x4x4_src.inp
*Part, name=PLATE
*Node
1, 0, 0, 0
2, 2.5, 0, 0
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*Element, type=C3D8R, elset=HOST
1, 1, 2, 43, 42, 206, 207, 248, 247
2, 2, 3, 44, 43, 207, 208, 249, 248
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*Solid Section, elset=HOST, material=MATRIX
,
*End Part
*Part, name=EMBFIB
** embmesh generated fibers
*Node, nset=EMBMESH_NODES
100000, 0, 13.5857864376, 5
100001, 100, 13.5857864376, 5
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*Element, type=T3D2, elset=EMBMESH_FIBERS
100000, 100000,100001
100001, 100002,100003
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*Solid Section, elset=EMBMESH_FIBERS, material=FIBER
3.14159265358979
*End Part
*Assembly, name=Assembly
*Instance, name=PLATE-1, part=PLATE
*End Instance
*Nset, nset=FIXED, instance=PLATE-1
1, 42, 83, 124, 165, 206
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*Nset, nset=TIP, instance=PLATE-1
41, 82, 123, 164, 205, 246
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*Instance, name=EMBFIB-1, part=EMBFIB
*End Instance
*Embedded Element, host elset=PLATE-1.HOST
EMBFIB-1.EMBMESH_FIBERS
*End Assembly
*Material, name=MATRIX
*Density
1.2e-09,
*Elastic
3500, 0.35
*Material, name=FIBER
*Density
1.8e-09,
*Elastic
230000, 0.2
*Amplitude, name=RAMP, definition=SMOOTH STEP
0., 0., 0.0004, 1.
*Step, name=S1
*Dynamic, Explicit
, 0.0004
*Fixed Mass Scaling, factor=1.0
*Boundary
FIXED, 1, 3
*Dload
PLATE-1.HOST, GRAV, 9810., 0., 0., -1.
*Output, history, frequency=1000000
*Node Output, nset=TIP
RF1, RF2, RF3, U1, U2, U3
*Output, field, number interval=5
*Node Output
U, RF
*Element Output, directions=YES
S, E
*Output, history, time interval=8e-06
*Energy Output
ALLIE, ALLKE, ALLWK, ALLVD, ALLAE, ETOTAL
*End Step
